*Heading
** Job name: tension_10000MPa Model name: Model-1
** Generated by: Abaqus/CAE 2021
*Preprint, echo=NO, model=NO, history=NO, contact=NO
**
** PARTS
**
*Part, name=Part-1
*Node
      1,        -190.,         190.,        0.125
      2,        -190.,         -10.,        0.125
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*Element, type=C3D8
  1,  134,  401,  762,   97,    1,   21,   58,    4
  2,  401,  402,  763,  762,   21,   22,   57,   58
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*Nset, nset=Set-1
    9,   10,   11,   12,   13,   14
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*Elset, elset=Set-1, generate
 401,  800,    1
*Nset, nset=Set-3
    1,    2,    3,    4,    5,    6
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*Elset, elset=Set-3
    1,    2,    3,    4,    5,    6
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*Nset, nset="all set_section", generate
    1,  2205,     1
*Elset, elset="all set_section", generate
    1,  1600,     1
*Orientation, name=Ori-3
1., 0., 0., 0., 1., 0.
3, -45.
** Region: (Section-1:all set_section), (Material Orientation:Picked)
*Elset, elset=_I1, internal, generate
   1,  400,    1
** Section: Section-1
*Solid Section, elset=_I1, orientation=Ori-3, material=waas1
,
*Orientation, name=Ori-1
1., 0., 0., 0., 1., 0.
3, 45.
** Region: (Section-1:all set_section), (Material Orientation:Picked)
*Elset, elset=_I2, internal, generate
 401,  800,    1
** Section: Section-1
*Solid Section, elset=_I2, orientation=Ori-1, material=waas1
,
*Orientation, name=Ori-2
1., 0., 0., 0., 1., 0.
3, 45.
** Region: (Section-1:all set_section), (Material Orientation:Picked)
*Elset, elset=_I3, internal, generate
  801,  1200,     1
** Section: Section-1
*Solid Section, elset=_I3, orientation=Ori-2, material=waas1
,
*Orientation, name=Ori-4
1., 0., 0., 0., 1., 0.
3, -45.
** Region: (Section-1:all set_section), (Material Orientation:Picked)
*Elset, elset=_I4, internal, generate
 1201,  1600,     1
** Section: Section-1
*Solid Section, elset=_I4, orientation=Ori-4, material=waas1
,
*End Part
**
**
** ASSEMBLY
**
*Assembly, name=Assembly
**
*Instance, name=Part-1-1, part=Part-1
*End Instance
**
*Nset, nset="Loading Face", instance=Part-1-1
   1,   4,   7,   8,  10,  11
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*Elset, elset="Loading Face", instance=Part-1-1
    1,   21,   41,   61,   81,  101
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*Nset, nset=Set-2, instance=Part-1-1
   5,   6,   7,   8,   9,  10
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*Elset, elset=Set-2, instance=Part-1-1
  381,  382,  383,  384,  385,  386
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*Nset, nset=Set-3, instance=Part-1-1
   2,   3,   5,   6,   9,  12
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*Elset, elset=Set-3, instance=Part-1-1
   20,   40,   60,   80,  100,  120
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*Nset, nset=Set-4, instance=Part-1-1
   17,   18,   19,   20,  325,  326
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*Elset, elset=Set-4, instance=Part-1-1, generate
  801,  1200,     1
*Nset, nset=Set-5, instance=Part-1-1
   1,   4,   7,   8,  10,  11
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*Elset, elset=Set-5, instance=Part-1-1
    1,   21,   41,   61,   81,  101
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*Nset, nset=ply1, instance=Part-1-1
  10,  11,  13,  14, 287, 288
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*Elset, elset=ply1, instance=Part-1-1, generate
 420,  800,   20
*Nset, nset=ply2, instance=Part-1-1
   4,   7,  10,  13,  97,  98
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*Elset, elset=ply2, instance=Part-1-1, generate
 1220,  1600,    20
*Nset, nset=ply3, instance=Part-1-1
   1,   4,   7,   8,  97,  98
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*Elset, elset=ply3, instance=Part-1-1, generate
   1,  381,   20
*Nset, nset=ply4, instance=Part-1-1
   1,   8,  17,  19, 116, 117
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*Elset, elset=ply4, instance=Part-1-1, generate
  820,  1200,    20
*Elset, elset=_Surf-1_S6, internal, instance=Part-1-1, generate
   1,  381,   20
*Elset, elset=_Surf-1_S4, internal, instance=Part-1-1, generate
  420,  1600,    20
*Surface, type=ELEMENT, name=Surf-1
_Surf-1_S6, S6
_Surf-1_S4, S4
*End Assembly
**
** MATERIALS
**
*Material, name=waas1
*Depvar
     25,
*User Material, constants=21
158490.,  9017.,  5703.,  0.316,  0.436,    55.,    72.,    72.
  1.152,  13.35,  13.35,  250.1,  250.1,   500.,  283.9,   43.9
  283.9,   500.,   66.5,  107.3, 0.0001
**
** BOUNDARY CONDITIONS
**
** Name: BC-2 Type: Displacement/Rotation
*Boundary
Set-2, 1, 1
** Name: BC-3 Type: Displacement/Rotation
*Boundary
Set-3, 2, 2
** Name: BC-4 Type: Displacement/Rotation
*Boundary
Set-4, 3, 3
** ----------------------------------------------------------------
**
** STEP: Load
**
*Step, name=Load, nlgeom=NO
*Static
0.01, 1., 1e-05, 0.01
**
** LOADS
**
** Name: Load-1   Type: Pressure
*Dsload
Surf-1, P, -10000.
**
** OUTPUT REQUESTS
**
*Restart, write, frequency=0
**
** FIELD OUTPUT: F-Output-1
**
*Output, field, variable=PRESELECT
**
** HISTORY OUTPUT: S22vsE22_ply1(new)
**
*Output, history
*Element Output, elset=ply1
E12, E22, S12, S22
**
** HISTORY OUTPUT: S22vsE22_ply1
**
*Element Output, elset=ply1
E22, S22
**
** HISTORY OUTPUT: S22vsE22_ply2
**
*Element Output, elset=ply2
E22, S22
**
** HISTORY OUTPUT: S22vsE22_ply3
**
*Element Output, elset=ply3
E22, S22
**
** HISTORY OUTPUT: S22vsE22_ply4
**
*Element Output, elset=ply4
E22, S22
**
** HISTORY OUTPUT: H-Output-1
**
*Output, history, variable=PRESELECT
*End Step
